// SBML level 2 version 4

model nameless()

  // Compartments:
  // Gut compartment
  compartment GUT = 1 _L;
  // Blood plasma compartment
  compartment PLASMA = 2.649 _L;
  // Compartment representing "rest of body"
  compartment ROB = 65.3 _L;
  // Volume of brain
  compartment BRAIN = 1.45 _L;
  // The same as blood brain barrier (BBB)
  compartment MEC = 0.000015 _L;

  // Species:
  substanceOnly species PFM_gut in GUT = 0;  // substance in _ng
  substanceOnly species PFM_p in PLASMA = 0;  // substance in _ng
  substanceOnly species PFM_r in ROB = 0;  // substance in _ng
  species A_b in BRAIN = 0.7493309;  // substance in _nM_L
  species O_b in BRAIN = 20.77858;  // substance in _nM_L
  species P_b in BRAIN = 6.541209;  // substance in _nM_L
  species L_b in BRAIN = 2.319571;  // substance in _nM_L
  species S_b in BRAIN = 3.427807;  // substance in _nM_L
  species NAPE_b in BRAIN = 0.00003879041;  // substance in _nM_L
  species NOPE_b in BRAIN = 0.0008814287;  // substance in _nM_L
  species NPPE_b in BRAIN = 0.0001732296;  // substance in _nM_L
  species NLPE_b in BRAIN = 0.00007550331;  // substance in _nM_L
  species NSPE_b in BRAIN = 0.0001272629;  // substance in _nM_L
  species FAAH_b in BRAIN = 15.366;  // substance in _nM_L
  species FAAHinh_b in BRAIN = 0;  // substance in _nM_L
  species A_r in ROB = 0.5419204; A_r is "AEA in rest of body";  // substance in _nM_L
  species O_r in ROB = 14.23822; O_r is "OEA in rest of body";  // substance in _nM_L
  species P_r in ROB = 4.121915; P_r is "PEA in rest of body";  // substance in _nM_L
  species L_r in ROB = 1.705466; L_r is "LEA in rest of body";  // substance in _nM_L
  species S_r in ROB = 2.515968; S_r is "SEA in rest of body";  // substance in _nM_L
  species NAPE_r in ROB = 0.000004241633;  // substance in _nM_L
  species NOPE_r in ROB = 0.00009638198;  // substance in _nM_L
  species NPPE_r in ROB = 0.00001894222;  // substance in _nM_L
  species NLPE_r in ROB = 0.000008256095;  // substance in _nM_L
  species NSPE_r in ROB = 0.00001391587;  // substance in _nM_L
  species FAAH_r in ROB = 2.165868;  // substance in _nM_L
  species FAAHinh_r in ROB = 0;  // substance in _nM_L
  species A_m in MEC = 0.97761;  // substance in _nM_L
  species O_m in MEC = 16.3219;  // substance in _nM_L
  species P_m in MEC = 5.809415;  // substance in _nM_L
  species L_m in MEC = 0;  // substance in _nM_L
  species S_m in MEC = 2.968774;  // substance in _nM_L
  species FAAH_m in MEC = 10.686;  // substance in _nM_L
  species FAAHinh_m in MEC = 0;  // substance in _nM_L
  species A_p in PLASMA = 0.8740574;  // substance in _nM_L
  species O_p in PLASMA = 5.085073;  // substance in _nM_L
  species P_p in PLASMA = 4.849307;  // substance in _nM_L
  species L_p in PLASMA = 1.916254;  // substance in _nM_L
  species S_p in PLASMA = 0.273772;  // substance in _nM_L

  // Parameters:
  F_PFM has _UL;
  dose_amount has _ng;
  PF_p has _nM;
  PF_b has _nM;
  PF_r has _nM;
  PF_m has _nM;
  FAAH_D_b has _UL;
  slag1_b has _UL;
  slag2_b has _UL;
  den_b has _UL;
  FAAH_D_r has _UL;
  c_NAT_ROB has _L;
  slag1_r has _UL;
  slag2_r has _UL;
  den_r has _UL;
  c_FAAH_ROB has _L;
  c_NAAA_ROB has _L;
  FAAH_D_m has _UL;
  Vmax_NAT = 300 _nM__h;
  p_A = 0.051 _UL;
  p_O = 0.098 _UL;
  p_P = 0.615 _UL;
  p_L = 0.016 _UL;
  p_S = 0.191 _UL;
  a_NAT_A = 1 _UL;
  a_NAT_O = 13 _UL;
  a_NAT_P = 0.42 _UL;
  a_NAT_L = 8.6 _UL;
  a_NAT_S = 1 _UL;
  b_NAT_Brain = 1.667 _UL;
  b_NAT_Pancreas = 0.333 _UL;
  b_NAT_Kidney = 0.667 _UL;
  b_NAT_Heart = 1 _UL;
  b_NAT_Lungs = 0.033 _UL;
  b_NAT_Muscles = 0.333 _UL;
  b_NAT_Testis = 0.667 _UL;
  b_NAT_Leucocytes = 0 _UL;
  k_NA_PE = 202 __h;
  k_NO_PE = 230 __h;
  k_NP_PE = 270 __h;
  k_NL_PE = 100 __h;
  k_NS_PE = 280 __h;
  Km_NA_PE = 2800 _nM;
  Km_NO_PE = 2900 _nM;
  Km_NP_PE = 3300 _nM;
  Km_NL_PE = 1000 _nM;
  Km_NS_PE = 3400 _nM;
  Ki_A = 230 _nM;
  Ki_O = 240 _nM;
  Ki_P = 6700 _nM;
  Ki_L = 1000 _nM;
  Ki_S = 840 _nM;
  kcat_FAAH = 18000 __h;
  FAAH_t = 78 _nM;
  a_FAAH_A = 1 _UL;
  a_FAAH_O = 5.7 _UL;
  a_FAAH_P = 37.8 _UL;
  a_FAAH_L = 1.15 _UL;
  a_FAAH_S = 1 _UL;
  b_FAAH_Liver = 1 _UL;
  b_FAAH_Brain = 0.197 _UL;
  b_FAAH_Gut = 0.034 _UL;
  b_FAAH_Spleen = 0.03 _UL;
  b_FAAH_Kidney = 0.069 _UL;
  b_FAAH_Lungs = 0.032 _UL;
  b_FAAH_Testis = 0.126 _UL;
  b_FAAH_MEC = 0.137 _UL;
  b_FAAH_Leucocytes = 0 _UL;
  Km_FAAH_A = 8200 _nM;
  Km_FAAH_O = 52200 _nM;
  Km_FAAH_P = 543000 _nM;
  Km_FAAH_L = 10800 _nM;
  Km_FAAH_S = 10000 _nM;
  k_deg_FAAH = 0.0051 __h;
  k_inh = 1.1 __nM__h;
  kcl_A = 1.74 __h;
  kcl_O = 2.5 __h;
  kcl_P = 2.61 __h;
  kcl_L = 1.25 __h;
  kcl_S = 1.2 __h;
  b_NAAA_Liver = 1 _UL;
  b_NAAA_Gut = 0.2 _UL;
  b_NAAA_Spleen = 8 _UL;
  b_NAAA_Kidney = 0.6 _UL;
  b_NAAA_Heart = 0.2 _UL;
  b_NAAA_Lungs = 14 _UL;
  b_NAAA_Thymus = 4 _UL;
  b_NAAA_Testis = 0.6 _UL;
  b_NAAA_Brain = 0.6 _UL;
  M_A = 347.5 __mole_g;
  M_O = 325.5 __mole_g;
  M_P = 299.5 __mole_g;
  M_L = 323.5 __mole_g;
  M_S = 321.5 __mole_g;
  Kd_CB1_A = 239.2 _nM;
  Kd_AG2 = 3424 _nM;
  AG2_b = 0;
  Dose = 10 _mg;
  M_PF = 455.4 __mole_g;
  Vss_PFM = 58.328 _L;
  Emax_PFM = 0.773 _UL;
  ED50 = 0.53 _mg;
  kabs_PFM = 2.2 __h;
  kout_PFM = 0.18 __h;
  kin_PFM = 0.117 __h;
  klinear_PFM = 0.0803 __h;
  Vm_PFM = 1511 _ng__h;
  Km_PFM = 26.1 _ng__L;
  R_PF = 0.6 _UL;
  Kp_b_PF = 1.3 _UL;
  Kp_m_PF = 1.3 _UL;
  Kp_r_PF = 1.5 _UL;
  m_per_n = 1000000 _1n6UL;
  PLD_b = 10000000 _nM;
  PLD_r = 10000000 _nM;
  LIVER = 1.69 _L;
  Gut = 1.65 _L;
  Spleen = 0.192 _L;
  Kidney = 0.28 _L;
  Lungs = 1.172 _L;
  Testis = 0.036 _L;
  Leucocytes = 0.025 _L;
  Pancreas = 0.077 _L;
  Heart = 0.31 _L;
  Muscles = 35 _L;
  Thymus = 0.029 _L;
  H = 0.48;
  ktr_m_p_A = 150 _nM__h;
  Ktr_p_m_A = 1.89 _UL;
  Km_p_m_A = 1 _nM;
  ktr_m_p_O = 10 __h;
  Ktr_p_m_O = 9.07 _UL;
  ktr_m_p_P = 10 __h;
  Ktr_p_m_P = 2.65 _UL;
  ktr_m_p_L = 0 __h;
  Ktr_p_m_L = 2.77 _UL;
  ktr_m_p_S = 10 __h;
  Ktr_p_m_S = 30.01 _UL;
  ktr_r_p_A = 100 _nM__h;
  ktr_r_p = 100 __h;
  Ktr_p_r_A = 0.62 _UL;
  Ktr_p_r_O = 2.8 _UL;
  Ktr_p_r_P = 0.85 _UL;
  Ktr_p_r_L = 0.89 _UL;
  Ktr_p_r_S = 9.19 _UL;

  // Assignment rules:
  F_PFM := Emax_PFM*Dose/(ED50 + Dose);
  dose_amount := F_PFM*m_per_n*Dose*F_PFM;
  PF_p := PFM_p/M_PF/Vss_PFM;
  PF_b := PF_p*Kp_b_PF;
  PF_r := PF_p*Kp_r_PF;
  PF_m := PF_p*Kp_m_PF;
  FAAH_D_b := 1 + A_b/Km_FAAH_A + O_b/Km_FAAH_O + P_b/Km_FAAH_P + L_b/Km_FAAH_L + S_b/Km_FAAH_S;
  slag1_b := NAPE_b/Km_NA_PE + NOPE_b/Km_NO_PE + NPPE_b/Km_NP_PE + NLPE_b/Km_NL_PE + NSPE_b/Km_NS_PE;
  slag2_b := A_b/Ki_A + O_b/Ki_O + P_b/Ki_P + L_b/Ki_L + S_b/Ki_S;
  den_b := 1 + slag1_b + slag2_b;
  FAAH_D_r := 1 + A_r/Km_FAAH_A + O_r/Km_FAAH_O + P_r/Km_FAAH_P + L_r/Km_FAAH_L + S_r/Km_FAAH_S;
  c_NAT_ROB := Pancreas*b_NAT_Pancreas + Kidney*b_NAT_Kidney + Heart*b_NAT_Heart + Lungs*b_NAT_Lungs + Muscles*b_NAT_Muscles + Testis*b_NAT_Testis + Leucocytes*b_NAT_Leucocytes;
  slag1_r := NAPE_r/Km_NA_PE + NOPE_r/Km_NO_PE + NPPE_r/Km_NP_PE + NLPE_r/Km_NL_PE + NSPE_r/Km_NS_PE;
  slag2_r := A_r/Ki_A + O_r/Ki_O + P_r/Ki_P + L_r/Ki_L + S_r/Ki_S;
  den_r := 1 + slag1_r + slag2_r;
  c_FAAH_ROB := LIVER*b_FAAH_Liver + Gut*b_FAAH_Gut + Spleen*b_FAAH_Spleen + Kidney*b_FAAH_Kidney + Lungs*b_FAAH_Lungs + Testis*b_FAAH_Testis + Leucocytes*b_FAAH_Leucocytes;
  c_NAAA_ROB := LIVER*b_NAAA_Liver + Gut*b_NAAA_Gut + Spleen*b_NAAA_Spleen + Kidney*b_NAAA_Kidney + Heart*b_NAAA_Heart + Lungs*b_NAAA_Lungs + Thymus*b_NAAA_Thymus + Testis*b_NAAA_Testis;
  FAAH_D_m := 1 + A_m/Km_FAAH_A + O_m/Km_FAAH_O + P_m/Km_FAAH_P + L_m/Km_FAAH_L + S_m/Km_FAAH_S;

  // Reactions:
  absorp: PFM_gut => PFM_p; kabs_PFM*PFM_gut;
  dist: PFM_p -> PFM_r; kout_PFM*PFM_p - kin_PFM*PFM_r;
  elim: PFM_p => ; klinear_PFM*PFM_p + Vm_PFM*PFM_p/Vss_PFM/(Km_PFM + PFM_p/Vss_PFM);
  vA_degr_b: A_b => ; BRAIN*FAAH_b*kcat_FAAH*a_FAAH_A*A_b/(Km_FAAH_A*FAAH_D_b);  // modifiers: FAAH_b
  vO_degr_b: O_b => ; BRAIN*FAAH_b*kcat_FAAH*a_FAAH_O*O_b/(Km_FAAH_O*FAAH_D_b);  // modifiers: FAAH_b
  vP_degr_b: P_b => ; BRAIN*FAAH_b*kcat_FAAH*a_FAAH_P*P_b/(Km_FAAH_P*FAAH_D_b);  // modifiers: FAAH_b
  vL_degr_b: L_b => ; BRAIN*FAAH_b*kcat_FAAH*a_FAAH_L*L_b/(Km_FAAH_L*FAAH_D_b);  // modifiers: FAAH_b
  vS_degr_b: S_b => ; BRAIN*FAAH_b*kcat_FAAH*a_FAAH_S*S_b/(Km_FAAH_S*FAAH_D_b);  // modifiers: FAAH_b
  vNAPE_syn_b: => NAPE_b; BRAIN*Vmax_NAT*p_A*a_NAT_A*b_NAT_Brain;
  vNOPE_syn_b: => NOPE_b; BRAIN*Vmax_NAT*p_O*a_NAT_O*b_NAT_Brain;
  vNPPE_syn_b: => NPPE_b; BRAIN*Vmax_NAT*p_P*a_NAT_P*b_NAT_Brain;
  vNLPE_syn_b: => NLPE_b; BRAIN*Vmax_NAT*p_L*a_NAT_L*b_NAT_Brain;
  vNSPE_syn_b: => NSPE_b; BRAIN*Vmax_NAT*p_S*a_NAT_S*b_NAT_Brain;
  vA_syn_b: NAPE_b => A_b; BRAIN*PLD_b*k_NA_PE*NAPE_b/Km_NA_PE/den_b;
  vO_syn_b: NOPE_b => O_b; BRAIN*PLD_b*k_NO_PE*NOPE_b/Km_NO_PE/den_b;
  vP_syn_b: NPPE_b => P_b; BRAIN*PLD_b*k_NP_PE*NPPE_b/Km_NP_PE/den_b;
  vL_syn_b: NLPE_b => L_b; BRAIN*PLD_b*k_NL_PE*NLPE_b/Km_NL_PE/den_b;
  vS_syn_b: NSPE_b => S_b; BRAIN*PLD_b*k_NS_PE*NSPE_b/Km_NS_PE/den_b;
  vFAAH_syn_b: => FAAH_b; BRAIN*FAAH_t*b_FAAH_Brain*k_deg_FAAH;
  vFAAH_degr_b: FAAH_b => ; BRAIN*k_deg_FAAH*FAAH_b;
  vFAAH_inh_b: FAAH_b => FAAHinh_b; BRAIN*k_inh*FAAH_b*PF_b;
  vFAAH_inh_degr_b: FAAHinh_b => ; BRAIN*k_deg_FAAH*FAAHinh_b;
  vA_UE_b: A_b => ; BRAIN*b_FAAH_Brain*kcl_A*A_b;
  vO_UE_b: O_b => ; BRAIN*b_FAAH_Brain*kcl_O*O_b;
  vP_UE_b: P_b => ; BRAIN*b_FAAH_Brain*kcl_P*P_b;
  vL_UE_b: L_b => ; BRAIN*b_FAAH_Brain*kcl_L*L_b;
  vS_UE_b: S_b => ; BRAIN*b_FAAH_Brain*kcl_S*S_b;
  vA_degr_r: A_r => ; ROB*FAAH_r*kcat_FAAH*a_FAAH_A*A_r/(Km_FAAH_A*FAAH_D_r);  // modifiers: FAAH_r
  vO_degr_r: O_r => ; ROB*FAAH_r*kcat_FAAH*a_FAAH_O*O_r/(Km_FAAH_O*FAAH_D_r);  // modifiers: FAAH_r
  vP_degr_r: P_r => ; ROB*FAAH_r*kcat_FAAH*a_FAAH_P*P_r/(Km_FAAH_P*FAAH_D_r);  // modifiers: FAAH_r
  vL_degr_r: L_r => ; ROB*FAAH_r*kcat_FAAH*a_FAAH_L*L_r/(Km_FAAH_L*FAAH_D_r);  // modifiers: FAAH_r
  vS_degr_r: S_r => ; ROB*FAAH_r*kcat_FAAH*a_FAAH_S*S_r/(Km_FAAH_S*FAAH_D_r);  // modifiers: FAAH_r
  vNAPE_syn_r: => NAPE_r; Vmax_NAT*p_A*a_NAT_A*c_NAT_ROB;
  vNOPE_syn_r: => NOPE_r; Vmax_NAT*p_O*a_NAT_O*c_NAT_ROB;
  vNPPE_syn_r: => NPPE_r; Vmax_NAT*p_P*a_NAT_P*c_NAT_ROB;
  vNLPE_syn_r: => NLPE_r; Vmax_NAT*p_L*a_NAT_L*c_NAT_ROB;
  vNSPE_syn_r: => NSPE_r; Vmax_NAT*p_S*a_NAT_S*c_NAT_ROB;
  vA_syn_r: NAPE_r => A_r; ROB*PLD_r*k_NA_PE*NAPE_r/Km_NA_PE/den_r;
  vO_syn_r: NOPE_r => O_r; ROB*PLD_r*k_NO_PE*NOPE_r/Km_NO_PE/den_r;
  vP_syn_r: NPPE_r => P_r; ROB*PLD_r*k_NP_PE*NPPE_r/Km_NP_PE/den_r;
  vL_syn_r: NLPE_r => L_r; ROB*PLD_r*k_NL_PE*NLPE_r/Km_NL_PE/den_r;
  vS_syn_r: NSPE_r => S_r; ROB*PLD_r*k_NS_PE*NSPE_r/Km_NS_PE/den_r;
  vFAAH_syn_r: => FAAH_r; FAAH_t*c_FAAH_ROB*k_deg_FAAH;
  vFAAH_degr_r: FAAH_r => ; ROB*k_deg_FAAH*FAAH_r;
  vFAAH_inh_r: FAAH_r => FAAHinh_r; ROB*k_inh*FAAH_r*PF_r;
  vFAAH_inh_degr_r: FAAHinh_r => ; ROB*k_deg_FAAH*FAAHinh_r;
  vA_UE_r: A_r => ; c_NAAA_ROB*kcl_A*A_r;
  vO_UE_r: O_r => ; c_NAAA_ROB*kcl_O*O_r;
  vP_UE_r: P_r => ; c_NAAA_ROB*kcl_P*P_r;
  vL_UE_r: L_r => ; c_NAAA_ROB*kcl_L*L_r;
  vS_UE_r: S_r => ; c_NAAA_ROB*kcl_S*S_r;
  vA_degr_m: A_m => ; MEC*FAAH_m*kcat_FAAH*a_FAAH_A*A_m/(Km_FAAH_A*FAAH_D_m);  // modifiers: FAAH_m
  vO_degr_m: O_m => ; MEC*FAAH_m*kcat_FAAH*a_FAAH_O*O_m/(Km_FAAH_O*FAAH_D_m);  // modifiers: FAAH_m
  vP_degr_m: P_m => ; MEC*FAAH_m*kcat_FAAH*a_FAAH_P*P_m/(Km_FAAH_P*FAAH_D_m);  // modifiers: FAAH_m
  vL_degr_m: L_m => ; MEC*FAAH_m*kcat_FAAH*a_FAAH_L*L_m/(Km_FAAH_L*FAAH_D_m);  // modifiers: FAAH_m
  vS_degr_m: S_m => ; MEC*FAAH_m*kcat_FAAH*a_FAAH_S*S_m/(Km_FAAH_S*FAAH_D_m);  // modifiers: FAAH_m
  vFAAH_syn_m: => FAAH_m; MEC*FAAH_t*b_FAAH_MEC*k_deg_FAAH;
  vFAAH_degr_m: FAAH_m => ; MEC*k_deg_FAAH*FAAH_m;
  vFAAH_inh_m: FAAH_m => FAAHinh_m; MEC*k_inh*FAAH_m*PF_m;
  vFAAH_inh_degr_m: FAAHinh_m => ; MEC*k_deg_FAAH*FAAHinh_m;
  vA_m_p: A_m -> A_p; MEC*ktr_m_p_A*(A_m - A_p*Ktr_p_m_A)/(A_m + A_p + Km_p_m_A);
  vO_m_p: O_m -> O_p; MEC*ktr_m_p_O*(O_m - O_p*Ktr_p_m_O);
  vP_m_p: P_m -> P_p; MEC*ktr_m_p_P*(P_m - P_p*Ktr_p_m_P);
  vL_m_p: L_m -> L_p; MEC*ktr_m_p_L*(L_m - L_p*Ktr_p_m_L);
  vS_m_p: S_m -> S_p; MEC*ktr_m_p_S*(S_m - S_p*Ktr_p_m_S);
  vA_b_m: A_b -> A_m; MEC*ktr_m_p_A*(A_b - A_m)/(A_m + A_b + Km_p_m_A);
  vO_b_m: O_b -> O_m; MEC*ktr_m_p_O*(O_b - O_m);
  vP_b_m: P_b -> P_m; MEC*ktr_m_p_P*(P_b - P_m);
  vL_b_m: L_b -> L_m; MEC*ktr_m_p_L*(L_b - L_m);
  vS_b_m: S_b -> S_m; MEC*ktr_m_p_S*(S_b - S_m);
  vA_r_p: A_r -> A_p; PLASMA*ktr_r_p_A*(A_r - A_p*Ktr_p_r_A)/(A_r + A_p + Km_p_m_A);
  vO_r_p: O_r -> O_p; PLASMA*ktr_r_p*(O_r - O_p*Ktr_p_r_O);
  vP_r_p: P_r -> P_p; PLASMA*ktr_r_p*(P_r - P_p*Ktr_p_r_P);
  vL_r_p: L_r -> L_p; PLASMA*ktr_r_p*(L_r - L_p*Ktr_p_r_L);
  vS_r_p: S_r -> S_p; PLASMA*ktr_r_p*(S_r - S_p*Ktr_p_r_S);

  // Events:
  evt1: at (true && (time >= 0)): PFM_gut = PFM_gut + dose_amount;

  // Unit definitions:
  unit _h = 3600 second;
  unit _nM__h = 1e-9 mole / (litre * 3600 second); _nM__h is "nM/h";
  unit _UL = dimensionless;
  unit __h = 1 / (3600 second); __h is "1/h";
  unit _nM = 1e-9 mole / litre;
  unit __nM__h = litre / (3600 second * 1e-9 mole); __nM__h is "1/h/nM";
  unit __mole_g = 1e-3 kilogram / mole; __mole_g is "g/mole";
  unit _mg = 1e-6 kilogram;
  unit _L = litre;
  unit _ng__h = 1e-12 kilogram / (3600 second); _ng__h is "ng/h";
  unit _ng__L = 1e-12 kilogram / litre; _ng__L is "ng/L";
  unit _ng = 1e-12 kilogram;
  unit _1n6UL = 1e-6 dimensionless; _1n6UL is "(1e-6 UL)";
  unit _nM_L = 1e-9 mole; _nM_L is "nM*L";
  unit _nmole__h = 1e-9 mole / (3600 second); _nmole__h is "nmole/h";
end
